// SBML level 3 version 1

model __main()

  // Compartments:
  compartment default_compartment = 1;

  // Species:
  species M in default_compartment;
  species E in default_compartment;
  species S in default_compartment;
  species ES in default_compartment;
  species P in default_compartment;
  species EP in default_compartment;
  species I in default_compartment;
  species EI in default_compartment;
  species EJ in default_compartment;

  // Parameters:
  ka_M_M_E = 1;
  kd_E_M_M = 1;
  ka_E_S_ES = 1;
  kd_ES_E_S = 1;
  ka_E_P_EP = 1;
  kd_EP_E_P = 1;
  kc_ES_E_P = 1;
  ka_E_I_EI = 1;
  kd_EI_E_I = 1;
  kc_EI_EJ = 1;

  // Reactions:
  _J0: M + M -> E; ka_M_M_E*M*M;
  _J1: E -> M + M; kd_E_M_M*E;
  _J2: E + S -> ES; ka_E_S_ES*E*S;
  _J3: ES -> E + S; kd_ES_E_S*ES;
  _J4: E + P -> EP; ka_E_P_EP*E*P;
  _J5: EP -> E + P; kd_EP_E_P*EP;
  _J6: ES -> E + P; kc_ES_E_P*ES;
  _J7: E + I -> EI; ka_E_I_EI*E*I;
  _J8: EI -> E + I; kd_EI_E_I*EI;
  _J9: EI -> EJ; kc_EI_EJ*EI;
end
