// SBML level 3 version 1

model __main()

  // Compartments:
  compartment default_compartment = 1;

  // Species:
  species s70 in default_compartment;
  species RNAP in default_compartment;
  species s70_RNAP in default_compartment;
  species Pg in default_compartment;
  species Pg_s70_RNAP in default_compartment;
  species s32 in default_compartment;
  species RNAP_s32 in default_compartment;
  species Ph in default_compartment;
  species Ph_RNAP_s32 in default_compartment;
  species DnaK in default_compartment;
  species s32_DnaK in default_compartment;
  species FtsH in default_compartment;
  species s32_FtsH in default_compartment;
  species Punfold in default_compartment;
  species Punfold_DnaK in default_compartment;
  species D in default_compartment;
  species D_s70_RNAP in default_compartment;
  species D_RNAP_s32 in default_compartment;
  species RNAP_D in default_compartment;
  species s32_DnaK_FtsH in default_compartment;
  species Pfold in default_compartment;
  species mRNA_s32 in default_compartment;
  species mRNA_DnaK in default_compartment;
  species mRNA_FtsH in default_compartment;
  species mRNA_Protein in default_compartment;

  // Parameters:
  ka_s70_RNAP = 1;
  kd_s70_RNAP = 1;
  ka_Pg_s70_RNAP = 1;
  kd_Pg_s70_RNAP = 1;
  ka_RNAP_s32 = 1;
  kd_RNAP_s32 = 1;
  ka_Ph_RNAP_s32 = 1;
  kd_Ph_RNAP_s32 = 1;
  ka_s32_DnaK = 1;
  kd_s32_DnaK = 1;
  ka_s32_FtsH = 1;
  kd_s32_FtsH = 1;
  ka_Punfold_DnaK = 1;
  kd_Punfold_DnaK = 1;
  ka_D_s70_RNAP = 1;
  kd_D_s70_RNAP = 1;
  ka_D_RNAP_s32 = 1;
  kd_D_RNAP_s32 = 1;
  ka_RNAP_D = 1;
  kd_RNAP_D = 1;
  ka_s32_DnaK_FtsH = 1;
  kd_s32_DnaK_FtsH = 1;
  kc_s32_FtsH = 1;
  kc_s32_DnaK_FtsH = 1;
  kc_Pfold_Punfold = 1;
  kc_Punfold_DnaK_Pfold_DnaK = 1;
  km_mRNA_s32_Pg_s70_RNAP = 1;
  n_mRNA_s32_Pg_s70_RNAP = 1;
  K_mRNA_s32_Pg_s70_RNAP = 1;
  km_mRNA_DnaK_Ph_RNAP_s32 = 1;
  n_mRNA_DnaK_Ph_RNAP_s32 = 1;
  K_mRNA_DnaK_Ph_RNAP_s32 = 1;
  km_mRNA_FtsH_Ph_RNAP_s32 = 1;
  n_mRNA_FtsH_Ph_RNAP_s32 = 1;
  K_mRNA_FtsH_Ph_RNAP_s32 = 1;
  km_mRNA_Protein = 1;
  kp_mRNA_s32_s32 = 1;
  kp_mRNA_FtsH_FtsH = 1;
  kp_mRNA_DnaK_DnaK = 1;
  kp_mRNA_Protein_Pfold = 1;
  kdeg_mRNA_s32 = 1;
  kdeg_mRNA_DnaK = 1;
  kdeg_mRNA_FtsH = 1;
  kdeg_mRNA_Protein = 1;
  kdeg_s32 = 1;
  kdeg_s32_DnaK = 1;
  kdeg_s32_FtsH = 1;
  kdeg_s32_DnaK_FtsH = 1;
  kdeg_FtsH = 1;
  kdeg_DnaK = 1;
  kdeg_Punfold_DnaK = 1;
  kdeg_Pfold = 1;
  kdeg_Punfold = 1;
  kdeg_RNAP_s32 = 1;
  kdeg_Ph_RNAP_s32 = 1;
  kdeg_D_RNAP_s32 = 1;

  // Reactions:
  _J0: s70 + RNAP -> s70_RNAP; ka_s70_RNAP*s70*RNAP;
  _J1: s70_RNAP -> s70 + RNAP; kd_s70_RNAP*s70_RNAP;
  _J2: Pg + s70_RNAP -> Pg_s70_RNAP; ka_Pg_s70_RNAP*Pg*s70_RNAP;
  _J3: Pg_s70_RNAP -> Pg + s70_RNAP; kd_Pg_s70_RNAP*Pg_s70_RNAP;
  _J4: RNAP + s32 -> RNAP_s32; ka_RNAP_s32*RNAP*s32;
  _J5: RNAP_s32 -> RNAP + s32; kd_RNAP_s32*RNAP_s32;
  _J6: Ph + RNAP_s32 -> Ph_RNAP_s32; ka_Ph_RNAP_s32*Ph*RNAP_s32;
  _J7: Ph_RNAP_s32 -> Ph + RNAP_s32; kd_Ph_RNAP_s32*Ph_RNAP_s32;
  _J8: s32 + DnaK -> s32_DnaK; ka_s32_DnaK*s32*DnaK;
  _J9: s32_DnaK -> s32 + DnaK; kd_s32_DnaK*s32_DnaK;
  _J10: s32 + FtsH -> s32_FtsH; ka_s32_FtsH*s32*FtsH;
  _J11: s32_FtsH -> s32 + FtsH; kd_s32_FtsH*s32_FtsH;
  _J12: Punfold + DnaK -> Punfold_DnaK; ka_Punfold_DnaK*Punfold*DnaK;
  _J13: Punfold_DnaK -> Punfold + DnaK; kd_Punfold_DnaK*Punfold_DnaK;
  _J14: D + s70_RNAP -> D_s70_RNAP; ka_D_s70_RNAP*D*s70_RNAP;
  _J15: D_s70_RNAP -> D + s70_RNAP; kd_D_s70_RNAP*D_s70_RNAP;
  _J16: D + RNAP_s32 -> D_RNAP_s32; ka_D_RNAP_s32*D*RNAP_s32;
  _J17: D_RNAP_s32 -> D + RNAP_s32; kd_D_RNAP_s32*D_RNAP_s32;
  _J18: RNAP + D -> RNAP_D; ka_RNAP_D*RNAP*D;
  _J19: RNAP_D -> RNAP + D; kd_RNAP_D*RNAP_D;
  _J20: s32_DnaK + FtsH -> s32_DnaK_FtsH; ka_s32_DnaK_FtsH*s32_DnaK*FtsH;
  _J21: s32_DnaK_FtsH -> s32_DnaK + FtsH; kd_s32_DnaK_FtsH*s32_DnaK_FtsH;
  _J22: s32_FtsH -> FtsH; kc_s32_FtsH*s32_FtsH;
  _J23: s32_DnaK_FtsH -> DnaK + FtsH; kc_s32_DnaK_FtsH*s32_DnaK_FtsH;
  _J24: Pfold -> Punfold; kc_Pfold_Punfold*Pfold;
  _J25: Punfold_DnaK -> Pfold + DnaK; kc_Punfold_DnaK_Pfold_DnaK*Punfold_DnaK;
  _J26: -> mRNA_s32; km_mRNA_s32_Pg_s70_RNAP*Pg_s70_RNAP^n_mRNA_s32_Pg_s70_RNAP/(K_mRNA_s32_Pg_s70_RNAP^n_mRNA_s32_Pg_s70_RNAP + Pg_s70_RNAP^n_mRNA_s32_Pg_s70_RNAP);  // modifiers: Pg_s70_RNAP
  _J27: -> mRNA_DnaK; km_mRNA_DnaK_Ph_RNAP_s32*Ph_RNAP_s32^n_mRNA_DnaK_Ph_RNAP_s32/(K_mRNA_DnaK_Ph_RNAP_s32^n_mRNA_DnaK_Ph_RNAP_s32 + Ph_RNAP_s32^n_mRNA_DnaK_Ph_RNAP_s32);  // modifiers: Ph_RNAP_s32
  _J28: -> mRNA_FtsH; km_mRNA_FtsH_Ph_RNAP_s32*Ph_RNAP_s32^n_mRNA_FtsH_Ph_RNAP_s32/(K_mRNA_FtsH_Ph_RNAP_s32^n_mRNA_FtsH_Ph_RNAP_s32 + Ph_RNAP_s32^n_mRNA_FtsH_Ph_RNAP_s32);  // modifiers: Ph_RNAP_s32
  _J29: -> mRNA_Protein; km_mRNA_Protein;
  _J30: -> s32; kp_mRNA_s32_s32*mRNA_s32;  // modifiers: mRNA_s32
  _J31: -> FtsH; kp_mRNA_FtsH_FtsH*mRNA_FtsH;  // modifiers: mRNA_FtsH
  _J32: -> DnaK; kp_mRNA_DnaK_DnaK*mRNA_DnaK;  // modifiers: mRNA_DnaK
  _J33: -> Pfold; kp_mRNA_Protein_Pfold*mRNA_Protein;  // modifiers: mRNA_Protein
  _J34: mRNA_s32 -> ; kdeg_mRNA_s32*mRNA_s32;
  _J35: mRNA_DnaK -> ; kdeg_mRNA_DnaK*mRNA_DnaK;
  _J36: mRNA_FtsH -> ; kdeg_mRNA_FtsH*mRNA_FtsH;
  _J37: mRNA_Protein -> ; kdeg_mRNA_Protein*mRNA_Protein;
  _J38: s32 -> ; kdeg_s32*s32;
  _J39: s32_DnaK -> ; kdeg_s32_DnaK*s32_DnaK;
  _J40: s32_FtsH -> ; kdeg_s32_FtsH*s32_FtsH;
  _J41: s32_DnaK_FtsH -> ; kdeg_s32_DnaK_FtsH*s32_DnaK_FtsH;
  _J42: FtsH -> ; kdeg_FtsH*FtsH;
  _J43: DnaK -> ; kdeg_DnaK*DnaK;
  _J44: Punfold_DnaK -> ; kdeg_Punfold_DnaK*Punfold_DnaK;
  _J45: Pfold -> ; kdeg_Pfold*Pfold;
  _J46: Punfold -> ; kdeg_Punfold*Punfold;
  _J47: RNAP_s32 -> RNAP; kdeg_RNAP_s32*RNAP_s32;
  _J48: Ph_RNAP_s32 -> Ph + RNAP; kdeg_Ph_RNAP_s32*Ph_RNAP_s32;
  _J49: D_RNAP_s32 -> RNAP_D; kdeg_D_RNAP_s32*D_RNAP_s32;
end
