// SBML level 3 version 2

model indra_model()

  // Compartments:
  compartment default = 1;

  // Species:
  substanceOnly species __s0 in default = MAP2K1_0; __s0 is "MAP2K1(mapk=None)";
  substanceOnly species __s1 in default = MAPK1_0; __s1 is "MAPK1(phospho='u', map2k=None, dusp=None)";
  substanceOnly species __s2 in default = DUSP6_0; __s2 is "DUSP6(mapk=None)";
  substanceOnly species __s3 in default = 0; __s3 is "MAP2K1(mapk=1) ._br_MAPK1(phospho='u', map2k=1, dusp=None)";
  substanceOnly species __s4 in default = 0; __s4 is "MAPK1(phospho='p', map2k=None, dusp=None)";
  substanceOnly species __s5 in default = 0; __s5 is "DUSP6(mapk=1) ._br_MAPK1(phospho='p', map2k=None, dusp=1)";

  // Parameters:
  kf_mm_bind_1 = 1e-6;
  kr_mm_bind_1 = 0.1;
  kc_mm_phosphorylation_1 = 100;
  kf_dm_bind_1 = 1e-6;
  kr_dm_bind_1 = 0.1;
  kc_dm_phosphorylation_1 = 100;
  MAP2K1_0 = 10000;
  MAPK1_0 = 10000;
  DUSP6_0 = 10000;

  // Reactions:
  r0: __s0 + __s1 -> __s3; kf_mm_bind_1*__s0*__s1 - kr_mm_bind_1*__s3; r0 is "MAP2K1_phosphorylation_bind_MAPK1_phospho + MAP2K1_dissoc_MAPK1";
  r1: __s3 => __s0 + __s4; kc_mm_phosphorylation_1*__s3; r1 is "MAP2K1_phosphorylation_MAPK1_phospho";
  r2: __s2 + __s4 -> __s5; kf_dm_bind_1*__s2*__s4 - kr_dm_bind_1*__s5; r2 is "DUSP6_dephosphorylation_bind_MAPK1_phospho + DUSP6_dissoc_MAPK1";
  r3: __s5 => __s1 + __s2; kc_dm_phosphorylation_1*__s5; r3 is "DUSP6_dephosphorylation_MAPK1_phospho";
end
